n := 10
i := 0, 1 .. 2*n
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x[i] := 2*π*i/(2*n + 1)
y := [-4.0; -4.2; -4.5; -4.7; -4.9; -5.0; -4.9; -4.8; -4.6; -4.4; -4.1; -3.8; -3.5; -3.1; -3.0; -3.0; -3.0; -3.1; -3.2; -3.4; -3.7]
x = [0; 0.299199; 0.598399; 0.897598; 1.1968; 1.496; 1.7952; 2.0944; 2.39359; 2.69279; 2.99199; 3.29119; 3.59039; 3.88959; 4.18879; 4.48799; 4.78719; 5.08639; 5.38559; 5.68479; 5.98399]
scale := 100
j := 0 .. scale
t[j] := min(x) + j*(max(x) - min(x))/scale
fintl(t) := linterp(x, y, t)
S := cspline(x, y)
fints(t) := interp(S, x, y, t)
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