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A := [2.53, 2.36, 1.93; 3.95, 4.11, 3.66; 2.78, 2.43, 1.94]
B := [12.66; 21.97; 13.93]
X := A^-1*B = [8.57678; -14.3211; 12.8283]
lsolve(A, B) = [8.57678; -14.3211; 12.8283]
Given
x[0] := 0
x[1] := 0
x[2] := 0
2.53*x[0] + 2.36*x[1] + 1.93*x[2] == 12.66
3.95*x[0] + 4.11*x[1] + 3.66*x[2] == 21.97
2.78*x[0] + 2.43*x[1] + 1.94*x[2] == 13.93
res := Find(x) = [8.57678; -14.3211; 12.8283]
