a := 8
b := 6
c := -3
f(x) := (x + 5)*(x + 4)*(x - 3)*(x - 2)*x*(x - 7)
f1(x) := a*x^7 + b*(x - 5)^3 + c*x
proizv(x) := d/dx(f(x)) → x*(x - 2)*(x - 3)*(x + 4)*(x + 5) + x*(x - 2)*(x - 3)*(x + 4)*(x - 7) + x*(x - 2)*(x - 3)*(x + 5)*(x - 7) + x*(x - 2)*(x + 4)*(x + 5)*(x - 7) + x*(x - 3)*(x + 4)*(x + 5)*(x - 7) + (x - 2)*(x - 3)*(x + 4)*(x + 5)*(x - 7)
indetical(A) :=
    N ← rows(A) - 1
    B[0] ← A[0]
    k ← 0
    for i ∈ 0 .. N
        flag ← 0
        for j ∈ 0 .. k
            flag ← 1 if A[i] == B[j]
        if flag == 0
            k ← k + 1
            B[k] ← A[i]
    B
proizv_scnd(x) := d/dx(proizv(x)) → 2*x*(x - 2)*(x - 3)*(x + 4) + 2*x*(x - 2)*(x - 3)*(x + 5) + 2*x*(x - 2)*(x + 4)*(x + 5) + 2*x*(x - 2)*(x - 3)*(x - 7) + 2*x*(x - 3)*(x + 4)*(x + 5) + 2*x*(x - 2)*(x + 4)*(x - 7) + 2*x*(x - 2)*(x + 5)*(x - 7) + 2*x*(x - 3)*(x + 4)*(x - 7) + 2*x*(x - 3)*(x + 5)*(x - 7) + 2*x*(x + 4)*(x + 5)*(x - 7) + 2*(x - 2)*(x - 3)*(x + 4)*(x + 5) + 2*(x - 2)*(x - 3)*(x + 4)*(x - 7) + 2*(x - 2)*(x - 3)*(x + 5)*(x - 7) + 2*(x - 2)*(x + 4)*(x + 5)*(x - 7) + 2*(x - 3)*(x + 4)*(x + 5)*(x - 7)
P(d) :=
    for i ∈ 0 .. rows(d)
        w[i] ← d
    w if length(w) == 1
    d otherwise
d := proizv(x) solve; assume, x == real → [5.94970029963; 2.55569590294; 0.873119635283; -2.30638027775; -4.5721355601] = [5.9497; 2.5557; 0.87312; -2.30638; -4.57214]
w := round(indetical(P(d)), 3) = [5.95; 2.556; 0.873; -2.306; -4.572]
itog1(f, w) :=
    n ← last(w)
    for i ∈ 0 .. n
        f_w[i] ← f(w[i])
    fmin ← min(f_w)
    fmax ← max(f_w)
    ddf(x) ← d^2/dx^2(f(x))
    for i ∈ 0 .. n
        [(x ← w[i]), (y ← f(x)), (ddy ← ddf(x))]
        E[i, 0] ← x
        if ddy > 0
            E[i, 1] ← "глобальный минимум" if |y - fmin| < 10^-6 or f(w[i]) == fmin
            E[i, 1] ← "локальный минимум" otherwise
        if ddy < 0
            E[i, 1] ← "глобальный максимум" if |y - fmax| < 10^-6
            E[i, 1] ← "локальный максимум" otherwise
        E[i, 1] ← "точка перегиба" if |ddy| < 10^-6
    E
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Q := itog1(f, w) = [
    5.95, "глобальный минимум";
    2.556, "локальный максимум";
    0.873, "локальный минимум";
    -2.306, "глобальный максимум";
    -4.572, "локальный минимум"
]
